OpenVSP model (file version 5), 8 components.
Geometry view with OpenVSP parameter names; values to 6 digits, angles in degrees, lengths in the model's unit.
Overall bounding box: X_Min=-5.03463 X_Len=16.3846 Y_Min=-7.88071 Y_Len=15.7614 Z_Min=-1.54818 Z_Len=4.80518

Wing "Wing"
  location (X Y Z) -1.925 0.8 0, rotation 0 0 0
  symmetric about XZ
  bounding box size 6.44733 15.7614 0.52955
  totals: TotalSpan=14.096 TotalProjectedSpan=14.096 TotalChord=3.48617 TotalArea=41.8653 TotalAR=4.74611
  root: chord 5.35, twist 3.6, NACA 64-series A=0 IdealCl=0 ThickChord=0.09
  sections:
    n  Span   Root_Chord  Tip_Chord  Area     Sweep  Sweep_Location  Dihedral  Twist  Twist_Location  tip airfoil
    1  1.1    5.35        3.9        5.0875   55     0               0         3.6    0.25            as above
    2  1.748  3.9         3.16       6.17044  30     0               0         3.6    0.25            NACA 64-series A=0 IdealCl=0 ThickChord=0.08
    3  4.2    3.16        1.447      9.6747   30     0               0         3.6    0.25            NACA 64-series A=0 IdealCl=0 ThickChord=0.05
  SS_Control "flaps": UStart=0.29 UEnd=0.73 Length_C_Start=0.194784 Length_C_End=0.212553 Length_Start=0.915 Length_End=0.435 LE_Flag=0 Surf_Type=2
  SS_Control "speedbrake": UStart=0.735 UEnd=0.798 Length_C_Start=0.249535 Length_C_End=0.4781 Length_Start=0.5 Length_End=0.7 LE_Flag=0 Surf_Type=2
  SS_Control "flaperon": UStart=0.29 UEnd=0.73 Length_C_Start=0.054878 Length_C_End=0.1235 Length_Start=0.25779 Length_End=0.252749 LE_Flag=0 Surf_Type=2
  SS_Control "slats": UStart=0.4 UEnd=0.79 Length_C_Start=0.15 Length_C_End=0.15 Length_Start=0.585 Length_End=0.229897 LE_Flag=1 Surf_Type=2

Wing "pylon-inboard", child of "Wing"
  location (X Y Z) 0.87 2.35 -0.08, rotation -90 0 0
  symmetric about XZ
  bounding box size 2.25 4.85 0.43
  totals: TotalSpan=0.86 TotalProjectedSpan=0.86 TotalChord=2.025 TotalArea=1.7415 TotalAR=0.424691
  root: chord 1.8, twist 0, ellipse Ellipse_Height=0.15 Ellipse_Width=1.8
  sections:
    n  Span  Root_Chord  Tip_Chord  Area     Sweep  Sweep_Location  Dihedral  Twist  Twist_Location  tip airfoil
    1  0.43  1.8         2.25       0.87075  -45    0               0         0      0.25            ellipse Ellipse_Height=0.15 Ellipse_Width=2.25

Wing "pylon-outboard", child of "Wing"
  location (X Y Z) 1.3 3.5 -0.08, rotation -90 0 0
  symmetric about XZ
  bounding box size 2.25 7.15 0.43
  totals: TotalSpan=0.86 TotalProjectedSpan=0.86 TotalChord=2.025 TotalArea=1.7415 TotalAR=0.424691
  root: chord 1.8, twist 0, ellipse Ellipse_Height=0.15 Ellipse_Width=1.8
  sections:
    n  Span  Root_Chord  Tip_Chord  Area     Sweep  Sweep_Location  Dihedral  Twist  Twist_Location  tip airfoil
    1  0.43  1.8         2.25       0.87075  -45    0               0         0      0.25            ellipse Ellipse_Height=0.15 Ellipse_Width=2.25

Wing "fence-board", child of "Wing"
  location (X Y Z) 0.35 2.23 0.08, rotation 90 0 -5
  symmetric about XZ
  bounding box size 1.67361 4.48 0.400953
  totals: TotalSpan=0.56 TotalProjectedSpan=0.56 TotalChord=1.34 TotalArea=0.7504 TotalAR=0.41791
  root: chord 1.68, twist 0, ellipse Ellipse_Height=0.02 Ellipse_Width=1.68
  sections:
    n  Span  Root_Chord  Tip_Chord  Area    Sweep  Sweep_Location  Dihedral  Twist  Twist_Location  tip airfoil
    1  0.28  1.68        1          0.3752  45     0               0         0      0.25            ellipse Ellipse_Height=0.02 Ellipse_Width=1

Wing "fence-outboard", child of "Wing"
  location (X Y Z) 2.4 6 0.05, rotation 90 0 -3
  symmetric about XZ
  bounding box size 0.99863 12.02 0.175354
  totals: TotalSpan=0.26 TotalProjectedSpan=0.26 TotalChord=0.8 TotalArea=0.208 TotalAR=0.325
  root: chord 1, twist 0, ellipse Ellipse_Height=0.02 Ellipse_Width=1
  sections:
    n  Span  Root_Chord  Tip_Chord  Area   Sweep  Sweep_Location  Dihedral  Twist  Twist_Location  tip airfoil
    1  0.13  1           0.6        0.104  45     0               0         0      0.25            ellipse Ellipse_Height=0.02 Ellipse_Width=0.6

Wing "Hstab"
  location (X Y Z) 8 0.2 0.4, rotation 0 0 0
  symmetric about XZ
  bounding box size 3.1106 6.27013 0.211525
  totals: TotalSpan=5.8 TotalProjectedSpan=5.8 TotalChord=1.715 TotalArea=9.947 TotalAR=3.38192
  root: chord 2.35, twist 0, NACA 64-series A=0 IdealCl=0 ThickChord=0.09
  sections:
    n  Span  Root_Chord  Tip_Chord  Area    Sweep  Sweep_Location  Dihedral  Twist  Twist_Location  tip airfoil
    1  2.9   2.35        1.08       4.9735  35     0               0         0      0.25            NACA 64-series A=0 IdealCl=0 ThickChord=0.07

Wing "Vstab"
  location (X Y Z) 7.35 0 0.2, rotation 90 0 0
  bounding box size 4 0.320039 3.057
  totals: TotalSpan=3.057 TotalProjectedSpan=3.057 TotalChord=3.275 TotalArea=8.56385 TotalAR=1.09124
  root: chord 4, twist 0, NACA 64-series A=1 IdealCl=0 ThickChord=0.08
  sections:
    n  Span   Root_Chord  Tip_Chord  Area     Sweep  Sweep_Location  Dihedral  Twist  Twist_Location  tip airfoil
    1  0.53   4           4          2.12     0      0.25            0         0      0.25            as above
    2  2.527  4           1.1        6.44385  28     0.25            0         0      0.25            NACA 4-series Camber=0 CamberLoc=0.2 ThickChord=0.1
  SS_Control "rudder": UStart=0.0853659 UEnd=0.689024 Length_C_Start=0.24 Length_C_End=0.24 Length_Start=0.96 Length_End=0.433756 LE_Flag=0 Surf_Type=2

Fuselage "FuselageGeom"
  location (X Y Z) -5 0 0, rotation 0 0 0
  bounding box size 15.3146 2.89395 2.62
  Design: Length=15.28
  cross sections:
    n  XLocPercent  YLocPercent  ZLocPercent  shape
    0  0            0            -0.0580645   point
    1  0.119904     0            -0.0335731   ellipse Ellipse_Height=1.7 Ellipse_Width=1.5
    2  0.145983     0            -0.0197842   ellipse Ellipse_Height=2.3 Ellipse_Width=2.1
    3  0.221823     0            -0.0155875   ellipse Ellipse_Height=2.62 Ellipse_Width=2.35
    4  0.38789      0            -0.0161871   ellipse Ellipse_Height=2.07 Ellipse_Width=2.84
    5  0.553957     0            0            ellipse Ellipse_Height=1.48 Ellipse_Width=1.85
    6  1            0            0.0263789    ellipse Ellipse_Height=0.46 Ellipse_Width=0.3

VSPAERO settings: Sref=41.8653 bref=14.096 cref=3.48617 Xcg=1.846 Ycg=0 Zcg=0 AlphaStart=5 AlphaEnd=60 AlphaNpts=1 BetaStart=-10 BetaEnd=10 BetaNpts=3 MachStart=0.4 MachEnd=0.9 MachNpts=1 ReCref=1e+07 Vinf=100 Rho=0.002377
  control group "speedbrake": DeflectionAngle=60
  control group "flaps": DeflectionAngle=30
  control group "left_flaperon": DeflectionAngle=51
  control group "rudder": DeflectionAngle=35
  control group "right_flaperon": DeflectionAngle=51
  control group "slats": DeflectionAngle=27.5
